// SBML level 2 version 4

model Nanog()

  // Compartments:
  compartment unnamed = 1;

  // Species:
  species DNA_on in unnamed = 0;
  species DNA_off in unnamed = 0;
  species RNA in unnamed = 0;
  species Protein in unnamed = 0;

  // Parameters:
  k_on = 10; k_on is "k_{on}";
  k_off = 1e-4; k_off is "k_{off}";
  k_m = 100;
  g_m = 3;
  k_p = 1000;
  g_p = 0.4;

  // Reactions:
  R1: DNA_off => DNA_on; k_on*DNA_off;
  R2: DNA_on + 2 Protein => DNA_off + 2 Protein; k_off*DNA_on*Protein^2;
  R3: DNA_on => DNA_on + RNA; k_m*DNA_on;
  R4: RNA => ; g_m*RNA;
  R5: RNA => RNA + Protein; k_p*RNA;
  R6: Protein => ; g_p*Protein;
end
