// SBML level 2 version 4

model Nanog()

  // Compartments:
  compartment unnamed = 1;

  // Species:
  species DNA_on in unnamed = 0; DNA_on is "DNA_{on}";
  species DNA_off in unnamed = 0; DNA_off is "DNA_{off}";
  species RNA in unnamed = 0;
  species Protein in unnamed = 0;

  // Parameters:
  k_on = 1; k_on is "k_{on}";
  k_off = 1; k_off is "k_{off}";
  k_m = 40;
  g_m = 3;
  k_p = 300;
  g_p = 0.4;

  // Reactions:
  R1: DNA_on => DNA_off; k_off*DNA_on;
  R2: DNA_off => DNA_on; k_on*DNA_off;
  R3: DNA_on => DNA_on + RNA; k_m*DNA_on;
  R4: RNA => ; g_m*RNA;
  R5: RNA => RNA + Protein; k_p*RNA;
  R6: Protein => ; g_p*Protein;
end
